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/batch
! ANSYS input file written by Workbench version 2023 R1
/assign,rstp,file,rst              ! Force Eigen analysis to write to file.rst because WB expects it
/solu
antype,,restart,,,perturbation
/title,Checkpoint1--Eigenvalue Buckling (B5)
/COM,/COM,     ANSYSMotion, 2023.1
perturb,buckle,,CURRENT,ALLKEEP                    ! linear buckling analysis keeping loads from pre-stress analysis
solve, elform                                       ! Generate matrices needed for perturbation analysis
bucopt,lanb,1,,,center
outres,erase
outres,all,none
outres,nsol,all
esel,s,type,,1
esel,a,type,,1,2
esel,a,type,,2,3
esel,a,type,,3,4
esel,a,type,,4,5
esel,a,type,,5,6
esel,a,type,,6,7
esel,a,type,,7,8
esel,a,type,,8,9
esel,a,type,,9,10
esel,a,type,,10,11
esel,a,type,,11,12
esel,a,type,,12,13
esel,a,type,,13,14
esel,a,type,,14,15
esel,a,type,,15,16
esel,a,type,,16,17
esel,a,type,,17,18
esel,a,type,,18,19
esel,a,type,,19,20
esel,a,type,,20,21
esel,a,type,,21,22
esel,a,type,,22,23
esel,a,type,,23,24
esel,a,type,,24,25
esel,a,type,,25,26
esel,a,type,,26,27
esel,a,type,,27,28
esel,a,type,,28,29
esel,a,type,,29
cm,_elmisc,elem
esel,all
outres,misc,all,_elmisc
mxpand,,,,yes,,no             ! expand requested element results, but not write them to file.mode
! *********** WB SOLVE COMMAND ***********
! check interactive state
*get,ANSINTER_,active,,int
*if,ANSINTER_,ne,0,then
/eof
*endif
solve
/com *************** Write FE CONNECTORS *********
CEWRITE,file,ce,,INTE
*get,_nmodalsolproc,active,0,numcpu
fini
*get,_NSOLTHREADS,active,0,ntfs
*get,_NSOLPROCESSES,active,0,npfs
/post1
fini
