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/batch
! ANSYS input file written by Workbench version 2023 R1
! File used for geometry attach: C:\Users\Sam\Documents\ANUWork\ENGN2217\ENGN2217-CLABS\CLAB-Week-4\Checkpoint1_files\dp0\SYS\DM\SYS.agdb
/title,Checkpoint1--Static Structural (A5)
/COM,/COM,     ANSYSMotion, 2023.1
/com,--- Data in consistent MKS units. See Solving Units in the help system for more information.
/units,MKS
/prep7
! Turn off shape checking because checks already performed inside WB mesher.
! See help system for more information.
SHPP,OFF,,NOWARN
etcon,set             ! allow ANSYS to choose best KEYOP's for 180x elements, resets any applicable keyopt to MAPDL defaults
/com,*********** Nodes for the whole assembly ***********
nblock,3,,844
(1i9,3e20.9e3)
        1     3.000000000E+00     0.000000000E+00     4.500000000E+00
        2     3.600000000E+00     0.000000000E+00     4.500000000E+00
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-1
/com,*********** Elements for Body 1 "Line Body" ***********
et,1,188
keyo,1,3,2
eblock,19,solid,,6
(19i9)
        1        1        1        1        0        0        0        0        3        0        1        1        3      381
        1        1        1        1        0        0        0        0        3        0        2        3        4      382
        1        1        1        1        0        0        0        0        3        0        3        4        5      383
        1        1        1        1        0        0        0        0        3        0        4        5        6      384
        1        1        1        1        0        0        0        0        3        0        5        6        7      385
        1        1        1        1        0        0        0        0        3        0        6        7        2      386
-1
/com,*********** Elements for Body 2 "Line Body" ***********
et,2,188
keyo,2,3,2
eblock,19,solid,,24
(19i9)
        2        2        2        2        0        0        0        0        3        0        7        1        9      387
        2        2        2        2        0        0        0        0        3        0        8        9       10      388
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-1
/com,*********** Elements for Body 3 "Line Body" ***********
et,3,188
keyo,3,3,2
eblock,19,solid,,6
(19i9)
        3        3        3        3        0        0        0        0        3        0       31        8       33      411
        3        3        3        3        0        0        0        0        3        0       32       33       34      412
        3        3        3        3        0        0        0        0        3        0       33       34       35      413
        3        3        3        3        0        0        0        0        3        0       34       35       36      414
        3        3        3        3        0        0        0        0        3        0       35       36       37      415
        3        3        3        3        0        0        0        0        3        0       36       37       32      416
-1
/com,*********** Elements for Body 4 "Line Body" ***********
et,4,188
keyo,4,3,2
eblock,19,solid,,6
(19i9)
        4        4        4        4        0        0        0        0        3        0       37       32       39      417
        4        4        4        4        0        0        0        0        3        0       38       39       40      418
        4        4        4        4        0        0        0        0        3        0       39       40       41      419
        4        4        4        4        0        0        0        0        3        0       40       41       42      420
        4        4        4        4        0        0        0        0        3        0       41       42       43      421
        4        4        4        4        0        0        0        0        3        0       42       43       38      422
-1
/com,*********** Elements for Body 5 "Line Body" ***********
et,5,188
keyo,5,3,2
eblock,19,solid,,12
(19i9)
        5        5        5        5        0        0        0        0        3        0       43       38       45      423
        5        5        5        5        0        0        0        0        3        0       44       45       46      424
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-1
/com,*********** Elements for Body 6 "Line Body" ***********
et,6,188
keyo,6,3,2
eblock,19,solid,,6
(19i9)
        6        6        6        6        0        0        0        0        3        0       55       44       57      435
        6        6        6        6        0        0        0        0        3        0       56       57       58      436
        6        6        6        6        0        0        0        0        3        0       57       58       59      437
        6        6        6        6        0        0        0        0        3        0       58       59       60      438
        6        6        6        6        0        0        0        0        3        0       59       60       61      439
        6        6        6        6        0        0        0        0        3        0       60       61       56      440
-1
/com,*********** Elements for Body 7 "Line Body" ***********
et,7,188
keyo,7,3,2
eblock,19,solid,,6
(19i9)
        7        7        7        7        0        0        0        0        3        0       61       56       63      441
        7        7        7        7        0        0        0        0        3        0       62       63       64      442
        7        7        7        7        0        0        0        0        3        0       63       64       65      443
        7        7        7        7        0        0        0        0        3        0       64       65       66      444
        7        7        7        7        0        0        0        0        3        0       65       66       67      445
        7        7        7        7        0        0        0        0        3        0       66       67       62      446
-1
/com,*********** Elements for Body 8 "Line Body" ***********
et,8,188
keyo,8,3,2
eblock,19,solid,,12
(19i9)
        8        8        8        8        0        0        0        0        3        0       67       62       69      447
        8        8        8        8        0        0        0        0        3        0       68       69       70      448
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-1
/com,*********** Elements for Body 9 "Line Body" ***********
et,9,188
keyo,9,3,2
eblock,19,solid,,12
(19i9)
        9        9        9        9        0        0        0        0        3        0       79       68       81      459
        9        9        9        9        0        0        0        0        3        0       80       81       82      460
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-1
/com,*********** Elements for Body 10 "Line Body" ***********
et,10,188
keyo,10,3,2
eblock,19,solid,,6
(19i9)
       10       10       10       10        0        0        0        0        3        0       91       80       93      471
       10       10       10       10        0        0        0        0        3        0       92       93       94      472
       10       10       10       10        0        0        0        0        3        0       93       94       95      473
       10       10       10       10        0        0        0        0        3        0       94       95       96      474
       10       10       10       10        0        0        0        0        3        0       95       96       97      475
       10       10       10       10        0        0        0        0        3        0       96       97       92      476
-1
/com,*********** Elements for Body 11 "Line Body" ***********
et,11,188
keyo,11,3,2
eblock,19,solid,,6
(19i9)
       11       11       11       11        0        0        0        0        3        0       97       92       99      477
       11       11       11       11        0        0        0        0        3        0       98       99      100      478
       11       11       11       11        0        0        0        0        3        0       99      100      101      479
       11       11       11       11        0        0        0        0        3        0      100      101      102      480
       11       11       11       11        0        0        0        0        3        0      101      102      103      481
       11       11       11       11        0        0        0        0        3        0      102      103       98      482
-1
/com,*********** Elements for Body 12 "Line Body" ***********
et,12,188
keyo,12,3,2
eblock,19,solid,,12
(19i9)
       12       12       12       12        0        0        0        0        3        0      103       98      105      483
       12       12       12       12        0        0        0        0        3        0      104      105      106      484
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-1
/com,*********** Elements for Body 13 "Line Body" ***********
et,13,188
keyo,13,3,2
eblock,19,solid,,6
(19i9)
       13       13       13       13        0        0        0        0        3        0      115      104      116      495
       13       13       13       13        0        0        0        0        3        0      116      116      117      496
       13       13       13       13        0        0        0        0        3        0      117      117      118      497
       13       13       13       13        0        0        0        0        3        0      118      118      119      498
       13       13       13       13        0        0        0        0        3        0      119      119      120      499
       13       13       13       13        0        0        0        0        3        0      120      120        2      500
-1
/com,*********** Elements for Body 14 "Line Body" ***********
et,14,188
keyo,14,3,2
eblock,19,solid,,36
(19i9)
       14       14       14       14        0        0        0        0        3        0      121      121      123      501
       14       14       14       14        0        0        0        0        3        0      122      123      124      502
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-1
/com,*********** Elements for Body 15 "Line Body" ***********
et,15,188
keyo,15,3,2
eblock,19,solid,,36
(19i9)
       15       15       15       15        0        0        0        0        3        0      157      158      160      537
       15       15       15       15        0        0        0        0        3        0      158      160      161      538
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-1
/com,*********** Elements for Body 16 "Line Body" ***********
et,16,188
keyo,16,3,2
eblock,19,solid,,36
(19i9)
       16       16       16       16        0        0        0        0        3        0      193      195      197      573
       16       16       16       16        0        0        0        0        3        0      194      197      198      574
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-1
/com,*********** Elements for Body 17 "Line Body" ***********
et,17,188
keyo,17,3,2
eblock,19,solid,,36
(19i9)
       17       17       17       17        0        0        0        0        3        0      229      232      234      609
       17       17       17       17        0        0        0        0        3        0      230      234      235      610
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-1
/com,*********** Elements for Body 18 "Line Body" ***********
et,18,188
keyo,18,3,2
eblock,19,solid,,9
(19i9)
       18       18       18       18        0        0        0        0        3        0      265       92      269      645
       18       18       18       18        0        0        0        0        3        0      266      269      270      646
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-1
/com,*********** Elements for Body 19 "Line Body" ***********
et,19,188
keyo,19,3,2
eblock,19,solid,,9
(19i9)
       19       19       19       19        0        0        0        0        3        0      274       56      277      654
       19       19       19       19        0        0        0        0        3        0      275      277      278      655
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-1
/com,*********** Elements for Body 20 "Line Body" ***********
et,20,188
keyo,20,3,2
eblock,19,solid,,9
(19i9)
       20       20       20       20        0        0        0        0        3        0      283       32      285      663
       20       20       20       20        0        0        0        0        3        0      284      285      286      664
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-1
/com,*********** Elements for Body 21 "Line Body" ***********
et,21,188
keyo,21,3,2
eblock,19,solid,,9
(19i9)
       21       21       21       21        0        0        0        0        3        0      292        2      293      672
       21       21       21       21        0        0        0        0        3        0      293      293      294      673
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-1
/com,*********** Elements for Body 22 "Line Body" ***********
et,22,188
keyo,22,3,2
eblock,19,solid,,11
(19i9)
       22       22       22       22        0        0        0        0        3        0      301        1      301      681
       22       22       22       22        0        0        0        0        3        0      302      301      302      682
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-1
/com,*********** Elements for Body 23 "Line Body" ***********
et,23,188
keyo,23,3,2
eblock,19,solid,,11
(19i9)
       23       23       23       23        0        0        0        0        3        0      312      104      311      692
       23       23       23       23        0        0        0        0        3        0      313      311      312      693
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-1
/com,*********** Elements for Body 24 "Line Body" ***********
et,24,188
keyo,24,3,2
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et,25,188
keyo,25,3,2
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et,26,188
keyo,26,3,2
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et,27,188
keyo,27,3,2
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et,28,188
keyo,28,3,2
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et,29,188
keyo,29,3,2
eblock,19,solid,,11
(19i9)
       29       29       29       29        0        0        0        0        3        0      378        8      371      758
       29       29       29       29        0        0        0        0        3        0      379      371      372      759
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-1
/com,*********** Send User Defined Coordinate System(s) ***********
csys,0
toffst,273.15,  ! Temperature offset from absolute zero
/com,*********** Set Reference Temperature ***********
tref,22.
/com,*********** Send Materials ***********
Temperature = 'TEMP' ! Temperature
MP,DENS,1,7850,	! kg m^-3
MP,ALPX,1,1.2e-05,	! C^-1
MP,C,1,434,	! J kg^-1 C^-1
MP,KXX,1,60.5,	! W m^-1 C^-1
MP,RSVX,1,1.7e-07,	! kg m^3 A^-2 s^-3
MP,EX,1,200000000000,	! Pa
MP,NUXY,1,0.3,
MP,MURX,1,10000,

Temperature = 'TEMP' ! Temperature
MP,DENS,2,7850,	! kg m^-3
MP,ALPX,2,1.2e-05,	! C^-1
MP,C,2,434,	! J kg^-1 C^-1
MP,KXX,2,60.5,	! W m^-1 C^-1
MP,RSVX,2,1.7e-07,	! kg m^3 A^-2 s^-3
MP,EX,2,200000000000,	! Pa
MP,NUXY,2,0.3,
MP,MURX,2,10000,

Temperature = 'TEMP' ! Temperature
MP,DENS,3,7850,	! kg m^-3
MP,ALPX,3,1.2e-05,	! C^-1
MP,C,3,434,	! J kg^-1 C^-1
MP,KXX,3,60.5,	! W m^-1 C^-1
MP,RSVX,3,1.7e-07,	! kg m^3 A^-2 s^-3
MP,EX,3,200000000000,	! Pa
MP,NUXY,3,0.3,
MP,MURX,3,10000,

Temperature = 'TEMP' ! Temperature
MP,DENS,4,7850,	! kg m^-3
MP,ALPX,4,1.2e-05,	! C^-1
MP,C,4,434,	! J kg^-1 C^-1
MP,KXX,4,60.5,	! W m^-1 C^-1
MP,RSVX,4,1.7e-07,	! kg m^3 A^-2 s^-3
MP,EX,4,200000000000,	! Pa
MP,NUXY,4,0.3,
MP,MURX,4,10000,

Temperature = 'TEMP' ! Temperature
MP,DENS,5,7850,	! kg m^-3
MP,ALPX,5,1.2e-05,	! C^-1
MP,C,5,434,	! J kg^-1 C^-1
MP,KXX,5,60.5,	! W m^-1 C^-1
MP,RSVX,5,1.7e-07,	! kg m^3 A^-2 s^-3
MP,EX,5,200000000000,	! Pa
MP,NUXY,5,0.3,
MP,MURX,5,10000,

Temperature = 'TEMP' ! Temperature
MP,DENS,6,7850,	! kg m^-3
MP,ALPX,6,1.2e-05,	! C^-1
MP,C,6,434,	! J kg^-1 C^-1
MP,KXX,6,60.5,	! W m^-1 C^-1
MP,RSVX,6,1.7e-07,	! kg m^3 A^-2 s^-3
MP,EX,6,200000000000,	! Pa
MP,NUXY,6,0.3,
MP,MURX,6,10000,

Temperature = 'TEMP' ! Temperature
MP,DENS,7,7850,	! kg m^-3
MP,ALPX,7,1.2e-05,	! C^-1
MP,C,7,434,	! J kg^-1 C^-1
MP,KXX,7,60.5,	! W m^-1 C^-1
MP,RSVX,7,1.7e-07,	! kg m^3 A^-2 s^-3
MP,EX,7,200000000000,	! Pa
MP,NUXY,7,0.3,
MP,MURX,7,10000,

Temperature = 'TEMP' ! Temperature
MP,DENS,8,7850,	! kg m^-3
MP,ALPX,8,1.2e-05,	! C^-1
MP,C,8,434,	! J kg^-1 C^-1
MP,KXX,8,60.5,	! W m^-1 C^-1
MP,RSVX,8,1.7e-07,	! kg m^3 A^-2 s^-3
MP,EX,8,200000000000,	! Pa
MP,NUXY,8,0.3,
MP,MURX,8,10000,

Temperature = 'TEMP' ! Temperature
MP,DENS,9,7850,	! kg m^-3
MP,ALPX,9,1.2e-05,	! C^-1
MP,C,9,434,	! J kg^-1 C^-1
MP,KXX,9,60.5,	! W m^-1 C^-1
MP,RSVX,9,1.7e-07,	! kg m^3 A^-2 s^-3
MP,EX,9,200000000000,	! Pa
MP,NUXY,9,0.3,
MP,MURX,9,10000,

Temperature = 'TEMP' ! Temperature
MP,DENS,10,7850,	! kg m^-3
MP,ALPX,10,1.2e-05,	! C^-1
MP,C,10,434,	! J kg^-1 C^-1
MP,KXX,10,60.5,	! W m^-1 C^-1
MP,RSVX,10,1.7e-07,	! kg m^3 A^-2 s^-3
MP,EX,10,200000000000,	! Pa
MP,NUXY,10,0.3,
MP,MURX,10,10000,

Temperature = 'TEMP' ! Temperature
MP,DENS,11,7850,	! kg m^-3
MP,ALPX,11,1.2e-05,	! C^-1
MP,C,11,434,	! J kg^-1 C^-1
MP,KXX,11,60.5,	! W m^-1 C^-1
MP,RSVX,11,1.7e-07,	! kg m^3 A^-2 s^-3
MP,EX,11,200000000000,	! Pa
MP,NUXY,11,0.3,
MP,MURX,11,10000,

Temperature = 'TEMP' ! Temperature
MP,DENS,12,7850,	! kg m^-3
MP,ALPX,12,1.2e-05,	! C^-1
MP,C,12,434,	! J kg^-1 C^-1
MP,KXX,12,60.5,	! W m^-1 C^-1
MP,RSVX,12,1.7e-07,	! kg m^3 A^-2 s^-3
MP,EX,12,200000000000,	! Pa
MP,NUXY,12,0.3,
MP,MURX,12,10000,

Temperature = 'TEMP' ! Temperature
MP,DENS,13,7850,	! kg m^-3
MP,ALPX,13,1.2e-05,	! C^-1
MP,C,13,434,	! J kg^-1 C^-1
MP,KXX,13,60.5,	! W m^-1 C^-1
MP,RSVX,13,1.7e-07,	! kg m^3 A^-2 s^-3
MP,EX,13,200000000000,	! Pa
MP,NUXY,13,0.3,
MP,MURX,13,10000,

Temperature = 'TEMP' ! Temperature
MP,DENS,14,7850,	! kg m^-3
MP,ALPX,14,1.2e-05,	! C^-1
MP,C,14,434,	! J kg^-1 C^-1
MP,KXX,14,60.5,	! W m^-1 C^-1
MP,RSVX,14,1.7e-07,	! kg m^3 A^-2 s^-3
MP,EX,14,200000000000,	! Pa
MP,NUXY,14,0.3,
MP,MURX,14,10000,

Temperature = 'TEMP' ! Temperature
MP,DENS,15,7850,	! kg m^-3
MP,ALPX,15,1.2e-05,	! C^-1
MP,C,15,434,	! J kg^-1 C^-1
MP,KXX,15,60.5,	! W m^-1 C^-1
MP,RSVX,15,1.7e-07,	! kg m^3 A^-2 s^-3
MP,EX,15,200000000000,	! Pa
MP,NUXY,15,0.3,
MP,MURX,15,10000,

Temperature = 'TEMP' ! Temperature
MP,DENS,16,7850,	! kg m^-3
MP,ALPX,16,1.2e-05,	! C^-1
MP,C,16,434,	! J kg^-1 C^-1
MP,KXX,16,60.5,	! W m^-1 C^-1
MP,RSVX,16,1.7e-07,	! kg m^3 A^-2 s^-3
MP,EX,16,200000000000,	! Pa
MP,NUXY,16,0.3,
MP,MURX,16,10000,

Temperature = 'TEMP' ! Temperature
MP,DENS,17,7850,	! kg m^-3
MP,ALPX,17,1.2e-05,	! C^-1
MP,C,17,434,	! J kg^-1 C^-1
MP,KXX,17,60.5,	! W m^-1 C^-1
MP,RSVX,17,1.7e-07,	! kg m^3 A^-2 s^-3
MP,EX,17,200000000000,	! Pa
MP,NUXY,17,0.3,
MP,MURX,17,10000,

Temperature = 'TEMP' ! Temperature
MP,DENS,18,7850,	! kg m^-3
MP,ALPX,18,1.2e-05,	! C^-1
MP,C,18,434,	! J kg^-1 C^-1
MP,KXX,18,60.5,	! W m^-1 C^-1
MP,RSVX,18,1.7e-07,	! kg m^3 A^-2 s^-3
MP,EX,18,200000000000,	! Pa
MP,NUXY,18,0.3,
MP,MURX,18,10000,

Temperature = 'TEMP' ! Temperature
MP,DENS,19,7850,	! kg m^-3
MP,ALPX,19,1.2e-05,	! C^-1
MP,C,19,434,	! J kg^-1 C^-1
MP,KXX,19,60.5,	! W m^-1 C^-1
MP,RSVX,19,1.7e-07,	! kg m^3 A^-2 s^-3
MP,EX,19,200000000000,	! Pa
MP,NUXY,19,0.3,
MP,MURX,19,10000,

Temperature = 'TEMP' ! Temperature
MP,DENS,20,7850,	! kg m^-3
MP,ALPX,20,1.2e-05,	! C^-1
MP,C,20,434,	! J kg^-1 C^-1
MP,KXX,20,60.5,	! W m^-1 C^-1
MP,RSVX,20,1.7e-07,	! kg m^3 A^-2 s^-3
MP,EX,20,200000000000,	! Pa
MP,NUXY,20,0.3,
MP,MURX,20,10000,

Temperature = 'TEMP' ! Temperature
MP,DENS,21,7850,	! kg m^-3
MP,ALPX,21,1.2e-05,	! C^-1
MP,C,21,434,	! J kg^-1 C^-1
MP,KXX,21,60.5,	! W m^-1 C^-1
MP,RSVX,21,1.7e-07,	! kg m^3 A^-2 s^-3
MP,EX,21,200000000000,	! Pa
MP,NUXY,21,0.3,
MP,MURX,21,10000,

Temperature = 'TEMP' ! Temperature
MP,DENS,22,7850,	! kg m^-3
MP,ALPX,22,1.2e-05,	! C^-1
MP,C,22,434,	! J kg^-1 C^-1
MP,KXX,22,60.5,	! W m^-1 C^-1
MP,RSVX,22,1.7e-07,	! kg m^3 A^-2 s^-3
MP,EX,22,200000000000,	! Pa
MP,NUXY,22,0.3,
MP,MURX,22,10000,

Temperature = 'TEMP' ! Temperature
MP,DENS,23,7850,	! kg m^-3
MP,ALPX,23,1.2e-05,	! C^-1
MP,C,23,434,	! J kg^-1 C^-1
MP,KXX,23,60.5,	! W m^-1 C^-1
MP,RSVX,23,1.7e-07,	! kg m^3 A^-2 s^-3
MP,EX,23,200000000000,	! Pa
MP,NUXY,23,0.3,
MP,MURX,23,10000,

Temperature = 'TEMP' ! Temperature
MP,DENS,24,7850,	! kg m^-3
MP,ALPX,24,1.2e-05,	! C^-1
MP,C,24,434,	! J kg^-1 C^-1
MP,KXX,24,60.5,	! W m^-1 C^-1
MP,RSVX,24,1.7e-07,	! kg m^3 A^-2 s^-3
MP,EX,24,200000000000,	! Pa
MP,NUXY,24,0.3,
MP,MURX,24,10000,

Temperature = 'TEMP' ! Temperature
MP,DENS,25,7850,	! kg m^-3
MP,ALPX,25,1.2e-05,	! C^-1
MP,C,25,434,	! J kg^-1 C^-1
MP,KXX,25,60.5,	! W m^-1 C^-1
MP,RSVX,25,1.7e-07,	! kg m^3 A^-2 s^-3
MP,EX,25,200000000000,	! Pa
MP,NUXY,25,0.3,
MP,MURX,25,10000,

Temperature = 'TEMP' ! Temperature
MP,DENS,26,7850,	! kg m^-3
MP,ALPX,26,1.2e-05,	! C^-1
MP,C,26,434,	! J kg^-1 C^-1
MP,KXX,26,60.5,	! W m^-1 C^-1
MP,RSVX,26,1.7e-07,	! kg m^3 A^-2 s^-3
MP,EX,26,200000000000,	! Pa
MP,NUXY,26,0.3,
MP,MURX,26,10000,

Temperature = 'TEMP' ! Temperature
MP,DENS,27,7850,	! kg m^-3
MP,ALPX,27,1.2e-05,	! C^-1
MP,C,27,434,	! J kg^-1 C^-1
MP,KXX,27,60.5,	! W m^-1 C^-1
MP,RSVX,27,1.7e-07,	! kg m^3 A^-2 s^-3
MP,EX,27,200000000000,	! Pa
MP,NUXY,27,0.3,
MP,MURX,27,10000,

Temperature = 'TEMP' ! Temperature
MP,DENS,28,7850,	! kg m^-3
MP,ALPX,28,1.2e-05,	! C^-1
MP,C,28,434,	! J kg^-1 C^-1
MP,KXX,28,60.5,	! W m^-1 C^-1
MP,RSVX,28,1.7e-07,	! kg m^3 A^-2 s^-3
MP,EX,28,200000000000,	! Pa
MP,NUXY,28,0.3,
MP,MURX,28,10000,

Temperature = 'TEMP' ! Temperature
MP,DENS,29,7850,	! kg m^-3
MP,ALPX,29,1.2e-05,	! C^-1
MP,C,29,434,	! J kg^-1 C^-1
MP,KXX,29,60.5,	! W m^-1 C^-1
MP,RSVX,29,1.7e-07,	! kg m^3 A^-2 s^-3
MP,EX,29,200000000000,	! Pa
MP,NUXY,29,0.3,
MP,MURX,29,10000,

/com,*********** Send Beam Properties ***********
SECTYPE,1,BEAM,I
SECDATA,0.23,0.23,0.17,1.5e-002,1.5e-002,2.e-002
secoffset,cent

SECTYPE,2,BEAM,I
SECDATA,0.23,0.23,0.17,1.5e-002,1.5e-002,2.e-002
secoffset,cent

SECTYPE,3,BEAM,I
SECDATA,0.23,0.23,0.17,1.5e-002,1.5e-002,2.e-002
secoffset,cent

SECTYPE,4,BEAM,I
SECDATA,0.23,0.23,0.17,1.5e-002,1.5e-002,2.e-002
secoffset,cent

SECTYPE,5,BEAM,I
SECDATA,0.23,0.23,0.17,1.5e-002,1.5e-002,2.e-002
secoffset,cent

SECTYPE,6,BEAM,I
SECDATA,0.23,0.23,0.17,1.5e-002,1.5e-002,2.e-002
secoffset,cent

SECTYPE,7,BEAM,I
SECDATA,0.23,0.23,0.17,1.5e-002,1.5e-002,2.e-002
secoffset,cent

SECTYPE,8,BEAM,I
SECDATA,0.23,0.23,0.17,1.5e-002,1.5e-002,2.e-002
secoffset,cent

SECTYPE,9,BEAM,I
SECDATA,0.23,0.23,0.17,1.5e-002,1.5e-002,2.e-002
secoffset,cent

SECTYPE,10,BEAM,I
SECDATA,0.23,0.23,0.17,1.5e-002,1.5e-002,2.e-002
secoffset,cent

SECTYPE,11,BEAM,I
SECDATA,0.23,0.23,0.17,1.5e-002,1.5e-002,2.e-002
secoffset,cent

SECTYPE,12,BEAM,I
SECDATA,0.23,0.23,0.17,1.5e-002,1.5e-002,2.e-002
secoffset,cent

SECTYPE,13,BEAM,I
SECDATA,0.23,0.23,0.17,1.5e-002,1.5e-002,2.e-002
secoffset,cent

SECTYPE,14,BEAM,I
SECDATA,0.23,0.23,0.17,1.5e-002,1.5e-002,2.e-002
secoffset,cent

SECTYPE,15,BEAM,I
SECDATA,0.23,0.23,0.17,1.5e-002,1.5e-002,2.e-002
secoffset,cent

SECTYPE,16,BEAM,I
SECDATA,0.23,0.23,0.17,1.5e-002,1.5e-002,2.e-002
secoffset,cent

SECTYPE,17,BEAM,I
SECDATA,0.23,0.23,0.17,1.5e-002,1.5e-002,2.e-002
secoffset,cent

SECTYPE,18,BEAM,I
SECDATA,0.23,0.23,0.17,1.5e-002,1.5e-002,2.e-002
secoffset,cent

SECTYPE,19,BEAM,I
SECDATA,0.23,0.23,0.17,1.5e-002,1.5e-002,2.e-002
secoffset,cent

SECTYPE,20,BEAM,I
SECDATA,0.23,0.23,0.17,1.5e-002,1.5e-002,2.e-002
secoffset,cent

SECTYPE,21,BEAM,I
SECDATA,0.23,0.23,0.17,1.5e-002,1.5e-002,2.e-002
secoffset,cent

SECTYPE,22,BEAM,I
SECDATA,0.23,0.23,0.17,1.5e-002,1.5e-002,2.e-002
secoffset,cent

SECTYPE,23,BEAM,I
SECDATA,0.23,0.23,0.17,1.5e-002,1.5e-002,2.e-002
secoffset,cent

SECTYPE,24,BEAM,I
SECDATA,0.23,0.23,0.17,1.5e-002,1.5e-002,2.e-002
secoffset,cent

SECTYPE,25,BEAM,I
SECDATA,0.23,0.23,0.17,1.5e-002,1.5e-002,2.e-002
secoffset,cent

SECTYPE,26,BEAM,I
SECDATA,0.23,0.23,0.17,1.5e-002,1.5e-002,2.e-002
secoffset,cent

SECTYPE,27,BEAM,I
SECDATA,0.23,0.23,0.17,1.5e-002,1.5e-002,2.e-002
secoffset,cent

SECTYPE,28,BEAM,I
SECDATA,0.23,0.23,0.17,1.5e-002,1.5e-002,2.e-002
secoffset,cent

SECTYPE,29,BEAM,I
SECDATA,0.23,0.23,0.17,1.5e-002,1.5e-002,2.e-002
secoffset,cent

!************************* Model Summary ********************
!Line Body,	Structural Steel,	matid,	1
!Line Body,	Structural Steel,	matid,	2
!Line Body,	Structural Steel,	matid,	3
!Line Body,	Structural Steel,	matid,	4
!Line Body,	Structural Steel,	matid,	5
!Line Body,	Structural Steel,	matid,	6
!Line Body,	Structural Steel,	matid,	7
!Line Body,	Structural Steel,	matid,	8
!Line Body,	Structural Steel,	matid,	9
!Line Body,	Structural Steel,	matid,	10
!Line Body,	Structural Steel,	matid,	11
!Line Body,	Structural Steel,	matid,	12
!Line Body,	Structural Steel,	matid,	13
!Line Body,	Structural Steel,	matid,	14
!Line Body,	Structural Steel,	matid,	15
!Line Body,	Structural Steel,	matid,	16
!Line Body,	Structural Steel,	matid,	17
!Line Body,	Structural Steel,	matid,	18
!Line Body,	Structural Steel,	matid,	19
!Line Body,	Structural Steel,	matid,	20
!Line Body,	Structural Steel,	matid,	21
!Line Body,	Structural Steel,	matid,	22
!Line Body,	Structural Steel,	matid,	23
!Line Body,	Structural Steel,	matid,	24
!Line Body,	Structural Steel,	matid,	25
!Line Body,	Structural Steel,	matid,	26
!Line Body,	Structural Steel,	matid,	27
!Line Body,	Structural Steel,	matid,	28
!Line Body,	Structural Steel,	matid,	29
!************************* End Model Summary ********************
/com,*********** Create Displacement Components For Use In Future MSUP or Multistage Analysis ******
CMBLOCK,_CM91_DISP,NODE,        2
(8i10)
       196       233
/com,*********** Create Displacement Components For Use In Future MSUP or Multistage Analysis ******
CMBLOCK,_CM97_DISP,NODE,        2
(8i10)
       122       159
/com,******* Constant Zero Displacement X *******
CMBLOCK,_DISPZEROUX,NODE,        2
(8i10)
       196       233
cmsel,s,_DISPZEROUX
d,all,ux,0
nsel,all
/com,******* Constant Zero Displacement Y *******
CMBLOCK,_DISPZEROUY,NODE,        2
(8i10)
       196       233
cmsel,s,_DISPZEROUY
d,all,uy,0
nsel,all
/com,******* Constant Zero Displacement Z *******
CMBLOCK,_DISPZEROUZ,NODE,        4
(8i10)
       122       159       196       233
cmsel,s,_DISPZEROUZ
d,all,uz,0
nsel,all
/com,*********** Define Vertex Force Using Follower Elements ***********
et,30,201
keyo,30,1,1           ! Keep the direction constant
keyo,30,2,1           ! Apply Forces only, not moment
mat,30
real,30
type,30
en,389,68
r,30
rmod,30,1,1.0,              ! FX
mat,31
real,31
type,30
en,390,68
r,31
rmod,31,2,1.0,              ! FY
mat,32
real,32
type,30
en,391,68
r,32
rmod,32,3,1.0,              ! FZ
fini
/com,****************************************************************************
/com,*************************    SOLUTION       ********************************
/com,****************************************************************************
/solu
antype,0                   ! static analysis
_thickRatio=  0     ! Ratio of thick parts in the model
eqsl,sparse,,,,,1
cntr,print,1               ! print out contact info and also make no initial contact an error
nldiag,cont,iter           ! print out contact info each equilibrium iteration
rescontrol,linear,last           ! Turn on restart files due to future eigen analysis intent
/com,****************************************************
/com,******************* SOLVE FOR LS 1 OF 1 ****************
esel,s,real,,30
sfe,all,1,pres,1,0.
esel,s,real,,31
sfe,all,1,pres,1,0.
esel,s,real,,32
sfe,all,1,pres,1,-90000.
esel,all
nsub,1,1,1
time,1.
outres,erase
outres,all,none
outres,nsol,all,
outres,rsol,all
outres,eangl,all
outres,etmp,all
outres,veng,all
outres,strs,all,
outres,epel,all,
outres,eppl,all,
outres,cont,all,
esel,s,type,,1
esel,a,type,,2,29
cm,_elmisc,elem
esel,all
outres,misc,all,_elmisc
! *********** WB SOLVE COMMAND ***********
! check interactive state
*get,ANSINTER_,active,,int
*if,ANSINTER_,ne,0,then
/eof
*endif
solve
/com *************** Write FE CONNECTORS *********
CEWRITE,file,ce,,INTE
/com,****************************************************
/com,*************** FINISHED SOLVE FOR LS 1 *************
*get,_NSOLTHREADS,active,0,ntfs
*get,_NSOLPROCESSES,active,0,npfs
/post1
fini
