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/batch
! ANSYS input file written by Workbench version 2023 R1
! File used for geometry attach: C:\Users\Sam\AppData\Local\Temp\WB_Sam_10708_3\wbnew_files\dp0\SYS\DM\SYS.agdb
/title,wbnew--Static Structural (A5)
/COM,/COM,     ANSYSMotion, 2023.1
/com,--- Data in consistent MKS units. See Solving Units in the help system for more information.
/units,MKS
/prep7
! Turn off shape checking because checks already performed inside WB mesher.
! See help system for more information.
SHPP,OFF,,NOWARN
etcon,set             ! allow ANSYS to choose best KEYOP's for 180x elements, resets any applicable keyopt to MAPDL defaults
/com,*********** Nodes for the whole assembly ***********
nblock,3,,139
(1i9,3e20.9e3)
        1     0.000000000E+00     0.000000000E+00     3.000000000E+00
        2     3.000000000E+00     0.000000000E+00     3.000000000E+00
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-1
/com,*********** Elements for Body 1 "Line Body" ***********
et,1,188
keyo,1,3,2
eblock,19,solid,,6
(19i9)
        1        1        1        1        0        0        0        0        3        0        1        1        3       64
        1        1        1        1        0        0        0        0        3        0        2        3        4       65
        1        1        1        1        0        0        0        0        3        0        3        4        5       66
        1        1        1        1        0        0        0        0        3        0        4        5        6       67
        1        1        1        1        0        0        0        0        3        0        5        6        7       68
        1        1        1        1        0        0        0        0        3        0        6        7        2       69
-1
/com,*********** Elements for Body 2 "Line Body" ***********
et,2,188
keyo,2,3,2
eblock,19,solid,,5
(19i9)
        2        2        2        2        0        0        0        0        3        0        7        2        9       70
        2        2        2        2        0        0        0        0        3        0        8        9       10       71
        2        2        2        2        0        0        0        0        3        0        9       10       11       72
        2        2        2        2        0        0        0        0        3        0       10       11       12       73
        2        2        2        2        0        0        0        0        3        0       11       12        8       74
-1
/com,*********** Elements for Body 3 "Line Body" ***********
et,3,188
keyo,3,3,2
eblock,19,solid,,6
(19i9)
        3        3        3        3        0        0        0        0        3        0       12        8       14       75
        3        3        3        3        0        0        0        0        3        0       13       14       15       76
        3        3        3        3        0        0        0        0        3        0       14       15       16       77
        3        3        3        3        0        0        0        0        3        0       15       16       17       78
        3        3        3        3        0        0        0        0        3        0       16       17       18       79
        3        3        3        3        0        0        0        0        3        0       17       18       13       80
-1
/com,*********** Elements for Body 4 "Line Body" ***********
et,4,188
keyo,4,3,2
eblock,19,solid,,6
(19i9)
        4        4        4        4        0        0        0        0        3        0       18       13       20       81
        4        4        4        4        0        0        0        0        3        0       19       20       21       82
        4        4        4        4        0        0        0        0        3        0       20       21       22       83
        4        4        4        4        0        0        0        0        3        0       21       22       23       84
        4        4        4        4        0        0        0        0        3        0       22       23       24       85
        4        4        4        4        0        0        0        0        3        0       23       24       19       86
-1
/com,*********** Elements for Body 5 "Line Body" ***********
et,5,188
keyo,5,3,2
eblock,19,solid,,5
(19i9)
        5        5        5        5        0        0        0        0        3        0       24       25       26       87
        5        5        5        5        0        0        0        0        3        0       25       26       27       88
        5        5        5        5        0        0        0        0        3        0       26       27       28       89
        5        5        5        5        0        0        0        0        3        0       27       28       29       90
        5        5        5        5        0        0        0        0        3        0       28       29       19       91
-1
/com,*********** Elements for Body 6 "Line Body" ***********
et,6,188
keyo,6,3,2
eblock,19,solid,,6
(19i9)
        6        6        6        6        0        0        0        0        3        0       29       30       31       92
        6        6        6        6        0        0        0        0        3        0       30       31       32       93
        6        6        6        6        0        0        0        0        3        0       31       32       33       94
        6        6        6        6        0        0        0        0        3        0       32       33       34       95
        6        6        6        6        0        0        0        0        3        0       33       34       35       96
        6        6        6        6        0        0        0        0        3        0       34       35        1       97
-1
/com,*********** Elements for Body 7 "Line Body" ***********
et,7,188
keyo,7,3,2
eblock,19,solid,,6
(19i9)
        7        7        7        7        0        0        0        0        3        0       35       36       37       98
        7        7        7        7        0        0        0        0        3        0       36       37       38       99
        7        7        7        7        0        0        0        0        3        0       37       38       39      100
        7        7        7        7        0        0        0        0        3        0       38       39       40      101
        7        7        7        7        0        0        0        0        3        0       39       40       41      102
        7        7        7        7        0        0        0        0        3        0       40       41        2      103
-1
/com,*********** Elements for Body 8 "Line Body" ***********
et,8,188
keyo,8,3,2
eblock,19,solid,,9
(19i9)
        8        8        8        8        0        0        0        0        3        0       41       25       42      104
        8        8        8        8        0        0        0        0        3        0       42       42       43      105
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-1
/com,*********** Elements for Body 9 "Line Body" ***********
et,9,188
keyo,9,3,2
eblock,19,solid,,6
(19i9)
        9        9        9        9        0        0        0        0        3        0       50       50       51      113
        9        9        9        9        0        0        0        0        3        0       51       51       52      114
        9        9        9        9        0        0        0        0        3        0       52       52       53      115
        9        9        9        9        0        0        0        0        3        0       53       53       54      116
        9        9        9        9        0        0        0        0        3        0       54       54       55      117
        9        9        9        9        0        0        0        0        3        0       55       55       25      118
-1
/com,*********** Elements for Body 10 "Line Body" ***********
et,10,188
keyo,10,3,2
eblock,19,solid,,9
(19i9)
       10       10       10       10        0        0        0        0        3        0       56        8       56      119
       10       10       10       10        0        0        0        0        3        0       57       56       57      120
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-1
/com,*********** Send User Defined Coordinate System(s) ***********
csys,0
toffst,273.15,  ! Temperature offset from absolute zero
/com,*********** Set Reference Temperature ***********
tref,22.
/com,*********** Send Materials ***********
Temperature = 'TEMP' ! Temperature
MP,DENS,1,7850,	! kg m^-3
MP,ALPX,1,1.2e-05,	! C^-1
MP,C,1,434,	! J kg^-1 C^-1
MP,KXX,1,60.5,	! W m^-1 C^-1
MP,RSVX,1,1.7e-07,	! kg m^3 A^-2 s^-3
MP,EX,1,200000000000,	! Pa
MP,NUXY,1,0.3,
MP,MURX,1,10000,

Temperature = 'TEMP' ! Temperature
MP,DENS,2,7850,	! kg m^-3
MP,ALPX,2,1.2e-05,	! C^-1
MP,C,2,434,	! J kg^-1 C^-1
MP,KXX,2,60.5,	! W m^-1 C^-1
MP,RSVX,2,1.7e-07,	! kg m^3 A^-2 s^-3
MP,EX,2,200000000000,	! Pa
MP,NUXY,2,0.3,
MP,MURX,2,10000,

Temperature = 'TEMP' ! Temperature
MP,DENS,3,7850,	! kg m^-3
MP,ALPX,3,1.2e-05,	! C^-1
MP,C,3,434,	! J kg^-1 C^-1
MP,KXX,3,60.5,	! W m^-1 C^-1
MP,RSVX,3,1.7e-07,	! kg m^3 A^-2 s^-3
MP,EX,3,200000000000,	! Pa
MP,NUXY,3,0.3,
MP,MURX,3,10000,

Temperature = 'TEMP' ! Temperature
MP,DENS,4,7850,	! kg m^-3
MP,ALPX,4,1.2e-05,	! C^-1
MP,C,4,434,	! J kg^-1 C^-1
MP,KXX,4,60.5,	! W m^-1 C^-1
MP,RSVX,4,1.7e-07,	! kg m^3 A^-2 s^-3
MP,EX,4,200000000000,	! Pa
MP,NUXY,4,0.3,
MP,MURX,4,10000,

Temperature = 'TEMP' ! Temperature
MP,DENS,5,7850,	! kg m^-3
MP,ALPX,5,1.2e-05,	! C^-1
MP,C,5,434,	! J kg^-1 C^-1
MP,KXX,5,60.5,	! W m^-1 C^-1
MP,RSVX,5,1.7e-07,	! kg m^3 A^-2 s^-3
MP,EX,5,200000000000,	! Pa
MP,NUXY,5,0.3,
MP,MURX,5,10000,

Temperature = 'TEMP' ! Temperature
MP,DENS,6,7850,	! kg m^-3
MP,ALPX,6,1.2e-05,	! C^-1
MP,C,6,434,	! J kg^-1 C^-1
MP,KXX,6,60.5,	! W m^-1 C^-1
MP,RSVX,6,1.7e-07,	! kg m^3 A^-2 s^-3
MP,EX,6,200000000000,	! Pa
MP,NUXY,6,0.3,
MP,MURX,6,10000,

Temperature = 'TEMP' ! Temperature
MP,DENS,7,7850,	! kg m^-3
MP,ALPX,7,1.2e-05,	! C^-1
MP,C,7,434,	! J kg^-1 C^-1
MP,KXX,7,60.5,	! W m^-1 C^-1
MP,RSVX,7,1.7e-07,	! kg m^3 A^-2 s^-3
MP,EX,7,200000000000,	! Pa
MP,NUXY,7,0.3,
MP,MURX,7,10000,

Temperature = 'TEMP' ! Temperature
MP,DENS,8,7850,	! kg m^-3
MP,ALPX,8,1.2e-05,	! C^-1
MP,C,8,434,	! J kg^-1 C^-1
MP,KXX,8,60.5,	! W m^-1 C^-1
MP,RSVX,8,1.7e-07,	! kg m^3 A^-2 s^-3
MP,EX,8,200000000000,	! Pa
MP,NUXY,8,0.3,
MP,MURX,8,10000,

Temperature = 'TEMP' ! Temperature
MP,DENS,9,7850,	! kg m^-3
MP,ALPX,9,1.2e-05,	! C^-1
MP,C,9,434,	! J kg^-1 C^-1
MP,KXX,9,60.5,	! W m^-1 C^-1
MP,RSVX,9,1.7e-07,	! kg m^3 A^-2 s^-3
MP,EX,9,200000000000,	! Pa
MP,NUXY,9,0.3,
MP,MURX,9,10000,

Temperature = 'TEMP' ! Temperature
MP,DENS,10,7850,	! kg m^-3
MP,ALPX,10,1.2e-05,	! C^-1
MP,C,10,434,	! J kg^-1 C^-1
MP,KXX,10,60.5,	! W m^-1 C^-1
MP,RSVX,10,1.7e-07,	! kg m^3 A^-2 s^-3
MP,EX,10,200000000000,	! Pa
MP,NUXY,10,0.3,
MP,MURX,10,10000,

/com,*********** Send Beam Properties ***********
SECTYPE,1,BEAM,CTUB
SECDATA,9.63e-002,0.109
secoffset,cent

SECTYPE,2,BEAM,CTUB
SECDATA,9.63e-002,0.109
secoffset,cent

SECTYPE,3,BEAM,CTUB
SECDATA,9.63e-002,0.109
secoffset,cent

SECTYPE,4,BEAM,CTUB
SECDATA,9.63e-002,0.109
secoffset,cent

SECTYPE,5,BEAM,CTUB
SECDATA,9.63e-002,0.109
secoffset,cent

SECTYPE,6,BEAM,CTUB
SECDATA,9.63e-002,0.109
secoffset,cent

SECTYPE,7,BEAM,CTUB
SECDATA,9.63e-002,0.109
secoffset,cent

SECTYPE,8,BEAM,CTUB
SECDATA,9.63e-002,0.109
secoffset,cent

SECTYPE,9,BEAM,CTUB
SECDATA,9.63e-002,0.109
secoffset,cent

SECTYPE,10,BEAM,CTUB
SECDATA,9.63e-002,0.109
secoffset,cent

!************************* Model Summary ********************
!Line Body,	Structural Steel,	matid,	1
!Line Body,	Structural Steel,	matid,	2
!Line Body,	Structural Steel,	matid,	3
!Line Body,	Structural Steel,	matid,	4
!Line Body,	Structural Steel,	matid,	5
!Line Body,	Structural Steel,	matid,	6
!Line Body,	Structural Steel,	matid,	7
!Line Body,	Structural Steel,	matid,	8
!Line Body,	Structural Steel,	matid,	9
!Line Body,	Structural Steel,	matid,	10
!************************* End Model Summary ********************
CMBLOCK,_CM61_FIXEDSU,NODE,        3
(8i10)
        30        36        50
/com,*********** Fixed Supports ***********
CMBLOCK,_FIXEDSU,NODE,        3
(8i10)
        30        36        50
cmsel,s,_FIXEDSU
d,all,all
nsel,all
/com,*********** Define Line Pressure Vector Using Surface Effect Elements ***********
local,12,0,0.,0.,0.,0.,0.,0.
csys,0
et,11,156
mat,11
keyop,11,5,1        !  No orientation node
eblock,10,,,9
(15i9)
       65       11       11       11       12       25       42
       66       11       11       11       12       42       43
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-1
esel,s,type,,11
keyop,11,2,1                ! Apply load in local coordinate system
esel,all
/com,*********** Define Line Pressure Vector Using Surface Effect Elements ***********
local,13,0,0.,0.,0.,0.,0.,0.
csys,0
et,12,156
mat,12
keyop,12,5,1        !  No orientation node
eblock,10,,,6
(15i9)
       74       12       12       12       13        1        3
       75       12       12       12       13        3        4
       76       12       12       12       13        4        5
       77       12       12       12       13        5        6
       78       12       12       12       13        6        7
       79       12       12       12       13        7        2
-1
esel,s,type,,12
keyop,12,2,1                ! Apply load in local coordinate system
esel,all
/com,*********** Define Vertex Force Using Follower Elements ***********
et,13,201
keyo,13,1,1           ! Keep the direction constant
keyo,13,2,1           ! Apply Forces only, not moment
mat,13
real,13
type,13
en,80,19
r,13
rmod,13,1,1.0,              ! FX
mat,14
real,14
type,13
en,81,19
r,14
rmod,14,2,1.0,              ! FY
mat,15
real,15
type,13
en,82,19
r,15
rmod,15,3,1.0,              ! FZ
/com,*********** Define Vertex Force Using Follower Elements ***********
et,16,201
keyo,16,1,1           ! Keep the direction constant
keyo,16,2,1           ! Apply Forces only, not moment
mat,16
real,16
type,16
en,83,25
r,16
rmod,16,1,1.0,              ! FX
mat,17
real,17
type,16
en,84,25
r,17
rmod,17,2,1.0,              ! FY
mat,18
real,18
type,16
en,85,25
r,18
rmod,18,3,1.0,              ! FZ
fini
/com,****************************************************************************
/com,*************************    SOLUTION       ********************************
/com,****************************************************************************
/solu
antype,0                   ! static analysis
_thickRatio=  0     ! Ratio of thick parts in the model
eqsl,sparse,,,,,1
cntr,print,1               ! print out contact info and also make no initial contact an error
nldiag,cont,iter           ! print out contact info each equilibrium iteration
rescontrol,linear,last           ! Turn on restart files due to future eigen analysis intent
/com,****************************************************
/com,******************* SOLVE FOR LS 1 OF 1 ****************
esel,s,type,,11
nsle
sfe,all,1,pres,1,0.
sfe,all,2,pres,1,0.
sfe,all,3,pres,1,-4400.
esel,s,type,,12
nsle
sfe,all,1,pres,1,0.
sfe,all,2,pres,1,0.
sfe,all,3,pres,1,-2200.
nsel,all
esel,all
esel,s,real,,13
sfe,all,1,pres,1,-22500.
esel,s,real,,14
sfe,all,1,pres,1,0.
esel,s,real,,15
sfe,all,1,pres,1,0.
esel,s,real,,16
sfe,all,1,pres,1,-45000.
esel,s,real,,17
sfe,all,1,pres,1,0.
esel,s,real,,18
sfe,all,1,pres,1,0.
esel,all
nsub,1,1,1
time,1.
outres,erase
outres,all,none
outres,nsol,all,
outres,rsol,all
outres,eangl,all
outres,etmp,all
outres,veng,all
outres,strs,all,
outres,epel,all,
outres,eppl,all,
outres,cont,all,
esel,s,type,,1
esel,a,type,,2,10
cm,_elmisc,elem
esel,all
outres,misc,all,_elmisc
! *********** WB SOLVE COMMAND ***********
! check interactive state
*get,ANSINTER_,active,,int
*if,ANSINTER_,ne,0,then
/eof
*endif
solve
/com *************** Write FE CONNECTORS *********
CEWRITE,file,ce,,INTE
/com,****************************************************
/com,*************** FINISHED SOLVE FOR LS 1 *************
*get,_NSOLTHREADS,active,0,ntfs
*get,_NSOLPROCESSES,active,0,npfs
/post1
fini
